units		electron
atom_style	full

pair_style      lj/cut/tip4p/long 1 2 1 1 0.278072379 8.
bond_style      class2
angle_style     harmonic

box tilt large
read_data	data.lmp
pair_coeff  * * 0 0
pair_coeff  1  1  0.000295147 5.96946

kspace_style	pppm/tip4p 1e-6
neighbor	2.0 bin
timestep	0.00025

fix 1 all ipi scp 32345 unix
run		100000000
